log awpmd.H2.log

variable MIN_R equal 0.4
variable MAX_R equal 2.5
variable N_POINTS equal 20
variable outpath string "H2.awpmd.dat"

units real
newton on
boundary m m m
processors  1 * *
atom_style wavepacket

#START INIT SECTION
region  box block -100 100 -100 100 -100 100
create_box  3 box
create_atoms 1 single 2.5 0 0
create_atoms 1 single -2.5 0 0
create_atoms 2 single 2.5 0 0
create_atoms 3 single -2.5 0 0

mass  1 0.0544616997098749
set type 1 charge 1
set type 1 spin/wpmd 0

mass 2 0.000544616997098749
set type 2 charge -1
set  type 2 spin/wpmd 1
set  type 2 eradius 0.8660254037844386

mass  3 0.000544616997098749
set type 3 charge -1
set type 3 spin/wpmd -1
set type 3 eradius 0.8660254037844386

group ion type 1
group eup type 2
group edown type 3
group electrons type 2 3

velocity all create 20 877785 dist gaussian
#END INIT SECTION

comm_modify vel yes

#PAIR_STYLE
pair_style  awpmd/cut 100 uhf
pair_coeff  * *
#END_PAIR_STYLE

compute energies all pair awpmd/cut
variable eng_total equal etotal
variable etotal_ev equal v_eng_total/627.509474*27.211386

variable dr equal (${MAX_R}-${MIN_R})/${N_POINTS}

thermo  1
thermo_modify norm yes
thermo_style custom step v_MAX_R v_etotal_ev pe temp

fix ave all ave/time 1 100 10000 v_MAX_R v_etotal_ev file ${outpath} off 1

label main_loop

variable X equal ${MAX_R}/2.0

set atom 1 x ${X}
set atom 2 x -${X}

set atom 3 x ${X}
set atom 4 x -${X}

fix mc all mc/wpmd 20 ev ex ew ewp

run 10000

unfix mc

variable MAX_R equal ${MAX_R}-${dr}

if "${MAX_R} < ${MIN_R}" then quit
jump SELF main_loop
